*Heading
** Job name: BENDING_10 Model name: BENDING
** Generated by: Abaqus/CAE 2022
*Preprint, echo=NO, model=NO, history=NO, contact=NO
**
** PARTS
**
*Part, name=Cross-section
*Node
      1,  -52.7299881,   36.6340981,         210.
      2,           0.,   37.1349983,   209.987488
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*Element, type=S4R
  1,    1,   40, 1371,  165
  2,   40,   41, 1372, 1371
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*Element, type=S3
7881,   22, 1343,  877
7882, 8327, 1343, 1344
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*Nset, nset=INSIDE_WALL_SIDE
    2,    3,    7,    8,    9,   10
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*Elset, elset=INSIDE_WALL_SIDE
 1189, 1190, 1191, 1192, 1193, 1194
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*Nset, nset=INSIDE_WALL_MIDDLE
    7,    8,   35,   36,   37,   38
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*Elset, elset=INSIDE_WALL_MIDDLE, generate
 6921,  7880,     1
*Nset, nset=WHOLE, generate
    1,  8817,     1
*Elset, elset=WHOLE, generate
    1,  8802,     1
*Nset, nset=OUTER_WALL
    1,    2,    3,    4,    5,    6
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*Elset, elset=OUTER_WALL
    1,    2,    3,    4,    5,    6
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** Section: OUTER_WALL
*SHELL SECTION, ELSET=OUTER_WALL, MATERIAL=C28_OUTER_WALL, SHELL THICKNESS=OUTER_DISTRIBUTION_THICKNESS
               1.,        5
*DISTRIBUTION, LOCATION=ELEMENT, TABLE=OUTER_DISTRIBUTION_TABLE_THICKNESS, NAME=OUTER_DISTRIBUTION_THICKNESS
        ,               1.
 7881,2.638149511422177
7882,2.7186667103105453
7883,2.6977966429284423
7884,2.6215983820815723
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6920,2.7588949425866534
** Section: INSIDE_WALL_SIDE
*SHELL SECTION, ELSET=INSIDE_WALL_SIDE, MATERIAL=C28_INSIDE_WALL_SIDE, SHELL THICKNESS=INSIDE_WALL_SIDE_DISTRIBUTION_THICKNESS
               1.,        5
*DISTRIBUTION, LOCATION=ELEMENT, TABLE=INSIDE_WALL_SIDE_DISTRIBUTION_TABLE_THICKNESS, NAME=INSIDE_WALL_SIDE_DISTRIBUTION_THICKNESS
        ,               1.
 8198,1.9456721600433828
8199,1.9639842376233134
8200,2.0993122453601134
8201,1.9237191492282724
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1476,1.9641116171103907
** Section: INSIDE_WALL_MIDDLE
*SHELL SECTION, ELSET=INSIDE_WALL_MIDDLE, MATERIAL=C28_INSIDE_WALL_MIDDLE, SHELL THICKNESS=INSIDE_WALL_MIDDLE_DISTRIBUTION_THICKNESS
               1.,        5
*DISTRIBUTION, LOCATION=ELEMENT, TABLE=INSIDE_WALL_MIDDLE_DISTRIBUTION_TABLE_THICKNESS, NAME=INSIDE_WALL_MIDDLE_DISTRIBUTION_THICKNESS
        ,               1.
 6921,1.4987623190988368
6922,1.6496592153733292
6923,1.6938685963926732
6924,1.332704743640521
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7880,1.7322178940510031
*End Part
**
*DISTRIBUTION TABLE, NAME=OUTER_DISTRIBUTION_TABLE_THICKNESS
LENGTH,
**
*DISTRIBUTION TABLE, NAME=INSIDE_WALL_SIDE_DISTRIBUTION_TABLE_THICKNESS
LENGTH,
**
*DISTRIBUTION TABLE, NAME=INSIDE_WALL_MIDDLE_DISTRIBUTION_TABLE_THICKNESS
LENGTH,
**
*Part, name=Impactor
*End Part
**
*Part, name=Support
*End Part
**
**
** ASSEMBLY
**
*Assembly, name=Assembly
**
*Instance, name=Cross-section, part=Cross-section
*End Instance
**
*Instance, name=Support-1, part=Support
          0.,         68.5,         52.5
          0.,         68.5,         52.5,           0.,         68.5,         53.5,          90.
*Node
      1,           0.,        -100., -1.83697009e-15
*Nset, nset=Support-1-RefPt_, internal
1,
*Nset, nset=SUPPORT_RP
 1,
*Surface, type=REVOLUTION, name=Support
START,          30.,         100.
 LINE,          30.,        -100.
*Rigid Body, ref node=Support-1-RefPt_, analytical surface=Support
*End Instance
**
*Instance, name=Support-2, part=Support
          0.,         68.5,        427.5
          0.,         68.5,        427.5,           0.,         68.5,        428.5,          90.
*Node
      1,           0.,        -100., -1.83697009e-15
*Nset, nset=Support-2-RefPt_, internal
1,
*Nset, nset=SUPPORT_RP
 1,
*Surface, type=REVOLUTION, name=Support
START,          30.,         100.
 LINE,          30.,        -100.
*Rigid Body, ref node=Support-2-RefPt_, analytical surface=Support
*End Instance
**
*Instance, name=Impactor-1, part=Impactor
          0.,        -68.5,         240.
          0.,        -68.5,         240.,           0.,        -68.5,         241.,          90.
*Node
      1,           0.,        -100., -1.83697009e-15
*Nset, nset=Impactor-1-RefPt_, internal
1,
*Nset, nset=IMPACTOR_PP
 1,
*Surface, type=REVOLUTION, name=Impactor
START,          30.,         100.
 LINE,          30.,        -100.
*Rigid Body, ref node=Impactor-1-RefPt_, analytical surface=Impactor
*End Instance
**
*End Assembly
*Amplitude, name=Load_amp, definition=SMOOTH STEP
             0.,              0.,          0.0025,              1.
**
** MATERIALS
**
*include,input=C28_10.inp
**
** INTERACTION PROPERTIES
**
*Surface Interaction, name=Interaction
*Friction
 0.05,
*Surface Behavior, pressure-overclosure=HARD
**
** BOUNDARY CONDITIONS
**
** Name: Clamp_impactor Type: Displacement/Rotation
*Boundary
Impactor-1.IMPACTOR_PP, 1, 1
Impactor-1.IMPACTOR_PP, 3, 3
Impactor-1.IMPACTOR_PP, 4, 4
Impactor-1.IMPACTOR_PP, 5, 5
Impactor-1.IMPACTOR_PP, 6, 6
** Name: Clamp_support1 Type: Displacement/Rotation
*Boundary
Support-1.SUPPORT_RP, 1, 1
Support-1.SUPPORT_RP, 2, 2
Support-1.SUPPORT_RP, 3, 3
Support-1.SUPPORT_RP, 4, 4
Support-1.SUPPORT_RP, 5, 5
Support-1.SUPPORT_RP, 6, 6
** Name: Clamp_support_2 Type: Displacement/Rotation
*Boundary
Support-2.SUPPORT_RP, 1, 1
Support-2.SUPPORT_RP, 2, 2
Support-2.SUPPORT_RP, 3, 3
Support-2.SUPPORT_RP, 4, 4
Support-2.SUPPORT_RP, 5, 5
Support-2.SUPPORT_RP, 6, 6
** ----------------------------------------------------------------
**
** STEP: Load
**
*Step, name=Load, nlgeom=YES
*Dynamic, Explicit
, 0.05
*Bulk Viscosity
0.06, 1.2
**
** BOUNDARY CONDITIONS
**
** Name: Load Type: Velocity/Angular velocity
*Boundary, amplitude=Load_amp, type=VELOCITY
Impactor-1.IMPACTOR_PP, 2, 2, 700.
**
** INTERACTIONS
**
** Interaction: Interaction
*Contact, op=NEW
*Contact Inclusions, ALL EXTERIOR
*Contact Property Assignment
 ,  , Interaction
**
** OUTPUT REQUESTS
**
*Restart, write, number interval=1, time marks=NO
**
** FIELD OUTPUT: F-Output-1
**
*Output, field, number interval=2
*Node Output
U,
*Element Output, directions=YES
MISES, PEEQ, SDV, STATUS
**
** HISTORY OUTPUT: H-Output-1
**
*Output, history, variable=PRESELECT
**
** HISTORY OUTPUT: F-D
**
*Output, history, time interval=5e-05
*Node Output, nset=Impactor-1.IMPACTOR_PP
RF2, U2
*End Step
