*Heading
** Job name: CRUSHING_74 Model name: CRUSHING
** Generated by: Abaqus/CAE 2022
*Preprint, echo=NO, model=NO, history=NO, contact=NO
**
** PARTS
**
*Part, name=Cross-section
*Node
      1,  -63.0149994,   26.5450001,   9.91499996
      2,  -63.0149994,   26.5450001,         430.
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*Element, type=S4R
  1,    1,   31, 1191,  210
  2,   31,   32, 1192, 1191
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*Nset, nset=INSIDE_WALL_SIDE
    9,   10,   17,   18,   19,   20
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*Elset, elset=INSIDE_WALL_SIDE, generate
 2891,  3400,     1
*Nset, nset=INSIDE_WALL_MIDDLE
   17,   18,   21,   22,   29,   30
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*Elset, elset=INSIDE_WALL_MIDDLE, generate
 6971,  7820,     1
*Nset, nset=WHOLE, generate
    1,  7826,     1
*Elset, elset=WHOLE, generate
    1,  7820,     1
*Nset, nset=OUTER_WALL
    1,    2,    3,    4,    5,    6
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*Elset, elset=OUTER_WALL
    1,    2,    3,    4,    5,    6
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*Nset, nset=CLAMPED
    2,    3,    4,    8,   10,   14
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*Elset, elset=CLAMPED
   85,  170,  255,  340,  425,  510
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** Section: OUTER_WALL
*SHELL SECTION, ELSET=OUTER_WALL, MATERIAL=C28_OUTER_WALL, SHELL THICKNESS=OUTER_DISTRIBUTION_THICKNESS
               1.,        5
*DISTRIBUTION, LOCATION=ELEMENT, TABLE=OUTER_DISTRIBUTION_TABLE_THICKNESS, NAME=OUTER_DISTRIBUTION_THICKNESS
        ,               1.
 1,2.562743571074966
2,2.6640281267912878
3,2.6078795671737973
4,2.6183901524727426
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6970,2.7689828985856346
** Section: INSIDE_WALL_SIDE
*SHELL SECTION, ELSET=INSIDE_WALL_SIDE, MATERIAL=C28_INSIDE_WALL_SIDE, SHELL THICKNESS=INSIDE_WALL_SIDE_DISTRIBUTION_THICKNESS
               1.,        5
*DISTRIBUTION, LOCATION=ELEMENT, TABLE=INSIDE_WALL_SIDE_DISTRIBUTION_TABLE_THICKNESS, NAME=INSIDE_WALL_SIDE_DISTRIBUTION_THICKNESS
        ,               1.
 2891,1.9727630429160123
2892,1.9063821261785157
2893,1.9488416174565921
2894,1.8600484177662744
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3400,1.9101055687494712
** Section: INSIDE_WALL_MIDDLE
*SHELL SECTION, ELSET=INSIDE_WALL_MIDDLE, MATERIAL=C28_INSIDE_WALL_MIDDLE, SHELL THICKNESS=INSIDE_WALL_MIDDLE_DISTRIBUTION_THICKNESS
               1.,        5
*DISTRIBUTION, LOCATION=ELEMENT, TABLE=INSIDE_WALL_MIDDLE_DISTRIBUTION_TABLE_THICKNESS, NAME=INSIDE_WALL_MIDDLE_DISTRIBUTION_THICKNESS
        ,               1.
 6971,1.444174619395373
6972,1.3788990847011873
6973,1.6577539262393333
6974,1.4025796873220773
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7820,1.594378310391657
*End Part
**
*DISTRIBUTION TABLE, NAME=OUTER_DISTRIBUTION_TABLE_THICKNESS
LENGTH,
**
*DISTRIBUTION TABLE, NAME=INSIDE_WALL_SIDE_DISTRIBUTION_TABLE_THICKNESS
LENGTH,
**
*DISTRIBUTION TABLE, NAME=INSIDE_WALL_MIDDLE_DISTRIBUTION_TABLE_THICKNESS
LENGTH,
**
*Part, name=Plate_impactor
*End Part
**
**
** ASSEMBLY
**
*Assembly, name=Assembly
**
*Instance, name=Cross-section, part=Cross-section
*End Instance
**
*Instance, name=IMPACTOR-1, part=Plate_impactor
          0.,           0.,          -1.
          0.,           0.,          -1.,           1.,           0.,          -1.,          90.
*Node
      1,        -100.,           0.,           0.
*Nset, nset=IMPACTOR-1-RefPt_, internal
1,
*Nset, nset=IMPACTOR_RP
 1,
*Surface, type=CYLINDER, name=Plate_impactor
START,        -100.,           0.
 LINE,         100.,           0.
*Rigid Body, ref node=IMPACTOR-1-RefPt_, analytical surface=Plate_impactor
*End Instance
**
*End Assembly
*Amplitude, name=Load_amp, definition=SMOOTH STEP
             0.,              0.,           0.005,              1.
**
** MATERIALS
**
*include,input=C28_74.inp
**
** INTERACTION PROPERTIES
**
*Surface Interaction, name=Interaction
*Friction
 0.05,
*Surface Behavior, pressure-overclosure=HARD
**
** BOUNDARY CONDITIONS
**
** Name: Clamp_cross-section Type: Displacement/Rotation
*Boundary
Cross-section.CLAMPED, 1, 1
Cross-section.CLAMPED, 2, 2
Cross-section.CLAMPED, 3, 3
Cross-section.CLAMPED, 4, 4
Cross-section.CLAMPED, 5, 5
Cross-section.CLAMPED, 6, 6
** Name: Clamp_impactor Type: Displacement/Rotation
*Boundary
IMPACTOR-1.IMPACTOR_RP, 1, 1
IMPACTOR-1.IMPACTOR_RP, 2, 2
IMPACTOR-1.IMPACTOR_RP, 4, 4
IMPACTOR-1.IMPACTOR_RP, 5, 5
IMPACTOR-1.IMPACTOR_RP, 6, 6
** ----------------------------------------------------------------
**
** STEP: loading
**
*Step, name=loading, nlgeom=YES
*Dynamic, Explicit
, 0.05
*Bulk Viscosity
0.06, 1.2
**
** BOUNDARY CONDITIONS
**
** Name: BC-3 Type: Velocity/Angular velocity
*Boundary, amplitude=Load_amp, type=VELOCITY
IMPACTOR-1.IMPACTOR_RP, 3, 3, 1500.
**
** INTERACTIONS
**
** Interaction: Interaction
*Contact, op=NEW
*Contact Inclusions, ALL EXTERIOR
*Contact Property Assignment
 ,  , Interaction
**
** OUTPUT REQUESTS
**
*Restart, write, number interval=1, time marks=NO
**
** FIELD OUTPUT: F-Output-1
**
*Output, field, number interval=2
*Node Output
U,
*Element Output, directions=YES
LE, MISES, PEEQ, SDV, STATUS
**
** HISTORY OUTPUT: H-Output-1
**
*Output, history, variable=PRESELECT
**
** HISTORY OUTPUT: F-D
**
*Output, history, time interval=5e-05
*Node Output, nset=IMPACTOR-1.IMPACTOR_RP
RF3, U3
*End Step
