*Heading
** Job name: CRUSHING_3 Model name: CRUSHING
** Generated by: Abaqus/CAE 2022
*Preprint, echo=NO, model=NO, history=NO, contact=NO
**
** PARTS
**
*Part, name=Cross-section
*Node
      1,      -62.625,       26.625,   9.91499996
      2,      -62.625,       26.625,         430.
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*Element, type=S4R
  1,    1,   31, 1191,  210
  2,   31,   32, 1192, 1191
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*Nset, nset=INSIDE_WALL_SIDE
    9,   10,   17,   18,   19,   20
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*Elset, elset=INSIDE_WALL_SIDE, generate
 2891,  3400,     1
*Nset, nset=INSIDE_WALL_MIDDLE
   17,   18,   21,   22,   29,   30
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*Elset, elset=INSIDE_WALL_MIDDLE, generate
 6971,  7820,     1
*Nset, nset=WHOLE, generate
    1,  7826,     1
*Elset, elset=WHOLE, generate
    1,  7820,     1
*Nset, nset=OUTER_WALL
    1,    2,    3,    4,    5,    6
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*Elset, elset=OUTER_WALL
    1,    2,    3,    4,    5,    6
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*Nset, nset=CLAMPED
    2,    3,    4,    8,   10,   14
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*Elset, elset=CLAMPED
   85,  170,  255,  340,  425,  510
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** Section: OUTER_WALL
*SHELL SECTION, ELSET=OUTER_WALL, MATERIAL=C28_OUTER_WALL, SHELL THICKNESS=OUTER_DISTRIBUTION_THICKNESS
               1.,        5
*DISTRIBUTION, LOCATION=ELEMENT, TABLE=OUTER_DISTRIBUTION_TABLE_THICKNESS, NAME=OUTER_DISTRIBUTION_THICKNESS
        ,               1.
 1,2.62343032507393
2,2.6947162009668992
3,2.757956435793103
4,2.6389604801444406
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6970,2.6761627502828453
** Section: INSIDE_WALL_SIDE
*SHELL SECTION, ELSET=INSIDE_WALL_SIDE, MATERIAL=C28_INSIDE_WALL_SIDE, SHELL THICKNESS=INSIDE_WALL_SIDE_DISTRIBUTION_THICKNESS
               1.,        5
*DISTRIBUTION, LOCATION=ELEMENT, TABLE=INSIDE_WALL_SIDE_DISTRIBUTION_TABLE_THICKNESS, NAME=INSIDE_WALL_SIDE_DISTRIBUTION_THICKNESS
        ,               1.
 2891,1.8358357196831903
2892,2.0360467763588885
2893,1.9817817592661857
2894,2.1012416801107854
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3400,1.8876537355958898
** Section: INSIDE_WALL_MIDDLE
*SHELL SECTION, ELSET=INSIDE_WALL_MIDDLE, MATERIAL=C28_INSIDE_WALL_MIDDLE, SHELL THICKNESS=INSIDE_WALL_MIDDLE_DISTRIBUTION_THICKNESS
               1.,        5
*DISTRIBUTION, LOCATION=ELEMENT, TABLE=INSIDE_WALL_MIDDLE_DISTRIBUTION_TABLE_THICKNESS, NAME=INSIDE_WALL_MIDDLE_DISTRIBUTION_THICKNESS
        ,               1.
 6971,1.3922488803580964
6972,1.3670257804519792
6973,1.7165313913716287
6974,1.5041684824216812
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7820,1.3308330688610042
*End Part
**
*DISTRIBUTION TABLE, NAME=OUTER_DISTRIBUTION_TABLE_THICKNESS
LENGTH,
**
*DISTRIBUTION TABLE, NAME=INSIDE_WALL_SIDE_DISTRIBUTION_TABLE_THICKNESS
LENGTH,
**
*DISTRIBUTION TABLE, NAME=INSIDE_WALL_MIDDLE_DISTRIBUTION_TABLE_THICKNESS
LENGTH,
**
*Part, name=Plate_impactor
*End Part
**
**
** ASSEMBLY
**
*Assembly, name=Assembly
**
*Instance, name=Cross-section, part=Cross-section
*End Instance
**
*Instance, name=IMPACTOR-1, part=Plate_impactor
          0.,           0.,          -1.
          0.,           0.,          -1.,           1.,           0.,          -1.,          90.
*Node
      1,        -100.,           0.,           0.
*Nset, nset=IMPACTOR-1-RefPt_, internal
1,
*Nset, nset=IMPACTOR_RP
 1,
*Surface, type=CYLINDER, name=Plate_impactor
START,        -100.,           0.
 LINE,         100.,           0.
*Rigid Body, ref node=IMPACTOR-1-RefPt_, analytical surface=Plate_impactor
*End Instance
**
*End Assembly
*Amplitude, name=Load_amp, definition=SMOOTH STEP
             0.,              0.,           0.005,              1.
**
** MATERIALS
**
*****************************************************************************
****                              OUTER WALL                             ****
*****************************************************************************
*material,name=C28_OUTER_WALL
*density
2.7e-9
*Elastic
70000, 0.3
*Plastic, hardening=USER, properties=8
** SIGMA0,  THETA1,     Q1,    THETA2,      Q2,   THETA3,       Q3,   BLANK
 267.1,  32.602, 1.8230,    1425.7,  48.633, 129300.0,    10.675,     0.0
*Depvar, delete=6
6,
1,PEEQ,"equivalent plastic strain"
2,DAMAGE,"Damage Cockcroft-Latham"
3,leote,"Element aspect ratio"
4,omega,"Element deformation mode"
5,N,"Element normal"
6,FAIL,"Failure status"
*User Defined Field, properties=8
** dcrit,     WcB,    WcS,   WcL,      c, phi, gamma,  THICK
     1.0,  390.47,  83.46,  33.0,  0.950, 1.0,   1.0, 2.65
*****************************************************************************
****                           INSIDE WALL SIDE                          ****
*****************************************************************************
*material,name=C28_INSIDE_WALL_SIDE
*density
2.7e-9
*Elastic
70000, 0.3
*Plastic, hardening=USER, properties=8
** SIGMA0,  THETA1,     Q1,    THETA2,      Q2,   THETA3,       Q3,   BLANK
 267.1,  32.602, 1.8230,    1425.7,  48.633, 129300.0,    10.675,     0.0
*Depvar, delete=6
6,
1,PEEQ,"equivalent plastic strain"
2,DAMAGE,"Damage Cockcroft-Latham"
3,leote,"Element aspect ratio"
4,omega,"Element deformation mode"
5,N,"Element normal"
6,FAIL,"Failure status"
*User Defined Field, properties=8
** dcrit,     WcB,    WcS,   WcL,      c, phi, gamma,  THICK
     1.0,  390.47,  83.46,  33.0,  0.950, 1.0,   1.0, 1.93
*****************************************************************************
****                          INSIDE WALL MIDDLE                         ****
*****************************************************************************
*material,name=C28_INSIDE_WALL_MIDDLE
*density
2.7e-9
*Elastic
70000, 0.3
*Plastic, hardening=USER, properties=8
** SIGMA0,  THETA1,     Q1,    THETA2,      Q2,   THETA3,       Q3,   BLANK
 267.1,  32.602, 1.8230,    1425.7,  48.633, 129300.0,    10.675,     0.0
*Depvar, delete=6
6,
1,PEEQ,"equivalent plastic strain"
2,DAMAGE,"Damage Cockcroft-Latham"
3,leote,"Element aspect ratio"
4,omega,"Element deformation mode"
5,N,"Element normal"
6,FAIL,"Failure status"
*User Defined Field, properties=8
** dcrit,     WcB,    WcS,   WcL,      c, phi, gamma,  THICK
     1.0,  390.47,  83.46,  33.0,  0.950, 1.0,   1.0, 1.27
**
** INTERACTION PROPERTIES
**
*Surface Interaction, name=Interaction
*Friction
 0.05,
*Surface Behavior, pressure-overclosure=HARD
**
** BOUNDARY CONDITIONS
**
** Name: Clamp_cross-section Type: Displacement/Rotation
*Boundary
Cross-section.CLAMPED, 1, 1
Cross-section.CLAMPED, 2, 2
Cross-section.CLAMPED, 3, 3
Cross-section.CLAMPED, 4, 4
Cross-section.CLAMPED, 5, 5
Cross-section.CLAMPED, 6, 6
** Name: Clamp_impactor Type: Displacement/Rotation
*Boundary
IMPACTOR-1.IMPACTOR_RP, 1, 1
IMPACTOR-1.IMPACTOR_RP, 2, 2
IMPACTOR-1.IMPACTOR_RP, 4, 4
IMPACTOR-1.IMPACTOR_RP, 5, 5
IMPACTOR-1.IMPACTOR_RP, 6, 6
** ----------------------------------------------------------------
**
** STEP: loading
**
*Step, name=loading, nlgeom=YES
*Dynamic, Explicit
, 0.05
*Bulk Viscosity
0.06, 1.2
**
** BOUNDARY CONDITIONS
**
** Name: BC-3 Type: Velocity/Angular velocity
*Boundary, amplitude=Load_amp, type=VELOCITY
IMPACTOR-1.IMPACTOR_RP, 3, 3, 1500.
**
** INTERACTIONS
**
** Interaction: Interaction
*Contact, op=NEW
*Contact Inclusions, ALL EXTERIOR
*Contact Property Assignment
 ,  , Interaction
**
** OUTPUT REQUESTS
**
*Restart, write, number interval=1, time marks=NO
**
** FIELD OUTPUT: F-Output-1
**
*Output, field, number interval=100
*Node Output
U,
*Element Output, directions=YES
LE, MISES, PEEQ, SDV, STATUS
**
** HISTORY OUTPUT: H-Output-1
**
*Output, history, variable=PRESELECT
**
** HISTORY OUTPUT: F-D
**
*Output, history, time interval=5e-05
*Node Output, nset=IMPACTOR-1.IMPACTOR_RP
RF3, U3
*End Step
