*Heading
** Job name: 3PB_BENDING_NOTCHED_82 Model name: 3PB_BENDING_NOTCHED
** Generated by: Abaqus/CAE 2022
*Preprint, echo=NO, model=NO, history=NO, contact=NO
**
** PARTS
**
*Part, name=Impactor
*End Part
**
*Part, name=Profile_shell
*Node
      1,  -56.7649994,   34.9500008,   304.030457
      2,  -53.9500008,   37.7649994,   304.417969
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*Element, type=S4R
 1,    1,   43, 1363,  114
 2,   43,    2,   44, 1363
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*Element, type=S3
5308, 7069, 6699, 6713
5309, 6800, 5882, 6750
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*Nset, nset=Middle_inner_wall
    7,    8,    9,   12,   17,   20
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*Elset, elset=Middle_inner_wall, generate
 6826,  7758,     1
*Nset, nset=Side_inner_wall
    5,    6,    7,    8,    9,   10
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*Elset, elset=Side_inner_wall
  469,  470,  471,  472,  473,  474
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*Nset, nset=Thick_wall
    1,    2,    3,    4,    5,    6
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*Elset, elset=Thick_wall
    1,    2,    3,    4,    5,    6
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** Section: Outer
*Shell Section, elset=Thick_wall, material=C28_OUTER
2.71, 5
** Section: Side_inner
*Shell Section, elset=Side_inner_wall, material=C28_INNER_SIDE
1.95, 5
** Section: Middle_inner
*Shell Section, elset=Middle_inner_wall, material=C28_INNER_MIDDLE
1.38, 5
*End Part
**
*Part, name=Support
*End Part
**
**
** ASSEMBLY
**
*Assembly, name=Assembly
**
*Instance, name=Profile_shell-1, part=Profile_shell
*End Instance
**
*Instance, name=Support-1, part=Support
          0.,         69.5,         52.5
          0.,         69.5,         52.5,           0.,         69.5,         53.5,          90.
*Node
      1,           0.,        -100., -1.83697009e-15
*Nset, nset=Support-1-RefPt_, internal
1,
*Nset, nset=Support_RP
 1,
*Surface, type=REVOLUTION, name=Support
START,          30.,         100.
 LINE,          30.,        -100.
*Rigid Body, ref node=Support-1-RefPt_, analytical surface=Support
*End Instance
**
*Instance, name=Support-2, part=Support
          0.,         69.5,        427.5
          0.,         69.5,        427.5,           0.,         69.5,        428.5,          90.
*Node
      1,           0.,        -100., -1.83697009e-15
*Nset, nset=Support-2-RefPt_, internal
1,
*Nset, nset=Support_RP
 1,
*Surface, type=REVOLUTION, name=Support
START,          30.,         100.
 LINE,          30.,        -100.
*Rigid Body, ref node=Support-2-RefPt_, analytical surface=Support
*End Instance
**
*Instance, name=Impactor-1, part=Impactor
          0.,        -69.5,         240.
          0.,        -69.5,         240.,           0.,        -69.5,         241.,          90.
*Node
      1,           0.,        -100., -1.83697009e-15
*Nset, nset=Impactor-1-RefPt_, internal
1,
*Nset, nset=Impactor_RP
 1,
*Surface, type=REVOLUTION, name=Impactor
START,          30.,         100.
 LINE,          30.,        -100.
*Rigid Body, ref node=Impactor-1-RefPt_, analytical surface=Impactor
*End Instance
**
*End Assembly
*Amplitude, name=Amp-1, definition=SMOOTH STEP
             0.,              0.,           0.005,              1.
**
** MATERIALS
**
*include,input=C28_82.inp
**
** INTERACTION PROPERTIES
**
*Surface Interaction, name=Int_prop
*Friction
 0.05,
*Surface Behavior, pressure-overclosure=HARD
**
** BOUNDARY CONDITIONS
**
** Name: Clamp_impactor Type: Displacement/Rotation
*Boundary
Impactor-1.Impactor_RP, 1, 1
Impactor-1.Impactor_RP, 3, 3
Impactor-1.Impactor_RP, 4, 4
Impactor-1.Impactor_RP, 5, 5
Impactor-1.Impactor_RP, 6, 6
** Name: Clamp_support1 Type: Displacement/Rotation
*Boundary
Support-1.Support_RP, 1, 1
Support-1.Support_RP, 2, 2
Support-1.Support_RP, 3, 3
Support-1.Support_RP, 4, 4
Support-1.Support_RP, 5, 5
Support-1.Support_RP, 6, 6
** Name: Clamp_support_2 Type: Displacement/Rotation
*Boundary
Support-2.Support_RP, 1, 1
Support-2.Support_RP, 2, 2
Support-2.Support_RP, 3, 3
Support-2.Support_RP, 4, 4
Support-2.Support_RP, 5, 5
Support-2.Support_RP, 6, 6
** ----------------------------------------------------------------
**
** STEP: Load
**
*Step, name=Load, nlgeom=YES
*Dynamic, Explicit
, 0.05
*Bulk Viscosity
0.06, 1.2
**
** BOUNDARY CONDITIONS
**
** Name: Load Type: Velocity/Angular velocity
*Boundary, amplitude=Amp-1, type=VELOCITY
Impactor-1.Impactor_RP, 2, 2, 700.
**
** INTERACTIONS
**
** Interaction: Interaction
*Contact, op=NEW
*Contact Inclusions, ALL EXTERIOR
*Contact Property Assignment
 ,  , Int_prop
**
** OUTPUT REQUESTS
**
*Restart, write, number interval=1, time marks=NO
**
** FIELD OUTPUT: F-Output-1
**
*Output, field, number interval=2
*Node Output
U,
*Element Output, directions=YES
MISES, PEEQ, SDV, STATUS
**
** HISTORY OUTPUT: H-Output-1
**
*Output, history, variable=PRESELECT
**
** HISTORY OUTPUT: F-D
**
*Output, history, time interval=5e-05
*Node Output, nset=Impactor-1.Impactor_RP
RF2, U2
*End Step
